// SBML level 3 version 1

model finalModel_NTDiff_and_AMPA()

  // Compartments:
  compartment default_1 = 1 volume;
  compartment default_2 = 1 volume;
  compartment default_3 = 1 volume;

  // Species:
  substanceOnly species $fakeinput_1 in default_1 = 0; fakeinput_1 is "fakeinput of 1";
  substanceOnly species $NT_2 in default_2; NT_2 is "NT of 2";
  species R0_3 in default_3 = 1/default_3; R0_3 is "R0 of 3";
  species R1_3 in default_3 = 0; R1_3 is "R1 of 3";
  species R2_3 in default_3 = 0; R2_3 is "R2 of 3";
  species R3_3 in default_3 = 0; R3_3 is "R3 of 3";
  species R4_3 in default_3 = 0; R4_3 is "R4 of 3";
  species $Glu_3 in default_3; Glu_3 is "Glu of 3";
  species D0_3 in default_3 = 0; D0_3 is "D0 of 3";
  species D1_3 in default_3 = 0; D1_3 is "D1 of 3";
  species D2_3 in default_3 = 0; D2_3 is "D2 of 3";
  species D3_3 in default_3 = 0; D3_3 is "D3 of 3";
  species D4_3 in default_3 = 0; D4_3 is "D4 of 3";
  species E2_3 in default_3 = 0; E2_3 is "E2 of 3";
  species E3_3 in default_3 = 0; E3_3 is "E3 of 3";
  species E4_3 in default_3 = 0; E4_3 is "E4 of 3";
  species O2_3 in default_3 = 0; O2_3 is "O2 of 3";
  species O3_3 in default_3 = 0; O3_3 is "O3 of 3";
  species O4_3 in default_3 = 0; O4_3 is "O4 of 3";
  substanceOnly species $Vm_3 in default_3 = -60; Vm_3 is "Vm of 3";
  substanceOnly species $LTP_ampaNbModFactor_3 in default_3 = 1; LTP_ampaNbModFactor_3 is "LTP_ampaNbModFactor of 3";

  // Parameters:
  Vmin_1 = 0 mVolts; Vmin_1 is "Vmin of 1";
  Vmax_1 = 3000 mVolts; Vmax_1 is "Vmax of 1";
  V_of_1 has mVolts;
  Delay_1 = 10 msec; Delay_1 is "Delay of 1";
  Npulses_1 = 1 substance; Npulses_1 is "Npulses of 1";
  tup_1 = 1 msec; tup_1 is "tup of 1";
  tdown_1 = 9 msec; tdown_1 is "tdown of 1";
  t_PULSE_up_1 = -1000000000 dimensionless; t_PULSE_up_1 is "t_PULSE_up of 1";
  t_PULSE_down_1 = -1000000000 dimensionless; t_PULSE_down_1 is "t_PULSE_down of 1";
  pulseNb_1 = 0 substance; pulseNb_1 is "pulseNb of 1";
  ON_1 = 0 substance; ON_1 is "ON of 1";
  OFF_1 = 0 substance; OFF_1 is "OFF of 1";
  NTconcAMPA_2 has mM; NTconcAMPA_2 is "concentration NT of 2";
  tempVar1_2 has dimensionless; tempVar1_2 is "tempVar1 of 2";
  tempVar2AMPA_2 has dimensionless; tempVar2AMPA_2 is "tempVar2AMPA of 2";
  k0_2 = 0.002188 dimensionless; k0_2 is "k0 of 2";
  distanceAMPA_2 = 0.03 microm; distanceAMPA_2 is "distanceAMPA of 2";
  cleftWidth_2 = 0.02 microm; cleftWidth_2 is "cleftWidth of 2";
  NTdiffCoef_2 = 0.4 micromsquare_per_ms; NTdiffCoef_2 is "NTdiffCoef of 2";
  PiValue_2 = 3.14159 dimensionless; PiValue_2 is "pi of 2";
  temp_time_2 = 0 ms; temp_time_2 is "temp variable for time of 2";
  temp_nt_2 = 0 substance; temp_nt_2 is "temp variable for nt of 2";
  tmp_fake_2 = 0 dimensionless; tmp_fake_2 is "feke deriv of 2";
  memorySize_2 = 40 ms; memorySize_2 is "memorySize of 2";
  position_unused_2 = 0.205 microm; position_unused_2 is "position_unused of 2";
  t0_2 = -1 ms;
  t1_2 = -1 ms;
  t2_2 = -1 ms;
  t3_2 = -1 ms;
  t4_2 = -1 ms;
  t5_2 = -1 ms;
  t6_2 = -1 ms;
  t7_2 = -1 ms;
  nt0_2 = 0 mM;
  nt1_2 = 0 mM;
  nt2_2 = 0 mM;
  nt3_2 = 0 mM;
  nt4_2 = 0 mM;
  nt5_2 = 0 mM;
  nt6_2 = 0 mM;
  nt7_2 = 0 mM;
  NTconcNMDA_2 has mM; NTconcNMDA_2 is "NTconcNMDA of 2";
  NTconcmGluR_2 has mM; NTconcmGluR_2 is "NTconcmGluR of 2";
  distanceNMDA_2 = 0.1 microm; distanceNMDA_2 is "distanceNMDA of 2";
  distancemGluR_2 = 1 microm; distancemGluR_2 is "distancemGluR of 2";
  tempVar2NMDA_2 has dimensionless; tempVar2NMDA_2 is "tempVar2NMDA of 2";
  tempVar2mGluR_2 has dimensionless; tempVar2mGluR_2 is "tempVar2mGluR of 2";
  kass_re1_3 = 10 per_mM_per_msec;
  kdiss_re1_3 = 7 per_msec;
  kass_re5_3 = 10 per_mM_per_msec;
  kdiss_re5_3 = 0.00041 per_msec;
  kass_re11_3 has per_msec;
  kdiss_re11_3 = 0.001 per_msec;
  kass_re12_3 has per_msec;
  kdiss_re12_3 = 0.017 per_msec;
  kass_re16_3 = 0.55 per_msec;
  kdiss_re16_3 has per_msec;
  kass_re19_3 = 0.2 per_msec;
  kdiss_re19_3 = 0.035 per_msec;
  conduc_O2_3 = 9 pS; conduc_O2_3 is "conductance for state O2 of 3";
  conduc_O3_3 = 15 pS; conduc_O3_3 is "conductance for state O3 of 3";
  conduc_O4_3 = 21 pS; conduc_O4_3 is "conductance for state 04 of 3";
  Erev_AMPA_3 = 0 mV; Erev_AMPA_3 is "AMPA reversal potential of 3";
  current_AMPA_3 has pA; current_AMPA_3 is "AMPA current of 3";
  sumOpen_3 has dimensionless; sumOpen_3 is "sumOpen = O2+O3+O4 of 3";
  PNa_3 = 50 percent; PNa_3 is "Permeability for Sodium (Na) of 3";
  PK_3 = 49.5 percent; PK_3 is "Permeability for Potassium (K) of 3";
  PCa_3 = 0.5 percent; PCa_3 is "Permeability for Calcium (Ca) of 3";
  ICa_AMPA_3 has pA; ICa_AMPA_3 is "AMPA mediated current by Ca of 3";
  INa_AMPA_3 has pA; INa_AMPA_3 is "AMPA mediated current by Na of 3";
  IK_AMPA_3 has pA; IK_AMPA_3 is "AMPA mediated current by K of 3";
  nbAMPAR_3 = 1 dimensionless; nbAMPAR_3 is "nbAMPAR of 3";
  NewNbAMPAR_3 has dimensionless;
  Deact_factor_3 = 1 dimensionless; Deact_factor_3 is "1.4601 for 1 Mm and 1.9725 for 5 mM of 3";
  Desens_factor_3 = 1 dimensionless; Desens_factor_3 is "1.8560 for 1mM and 13.4046 for 5 mM of 3";
  kdiss_re16_Init_3 = 0.3 per_msec;
  kass_re11_Init_3 = 3.3e-6 per_msec;
  kass_re12_Init_3 = 0.42 per_msec;

  // Assignment rules:
  V_of_1 := piecewise(Vmax_1, (ON_1 > 0) && (OFF_1 < 1), Vmin_1);
  tempVar1_2 := 4*PiValue_2*cleftWidth_2*NTdiffCoef_2;
  tempVar2AMPA_2 := -(distanceAMPA_2*distanceAMPA_2)/(4*NTdiffCoef_2);
  NTconcAMPA_2 := k0_2*(nt0_2/(tempVar1_2*(time - t0_2))*exp(tempVar2AMPA_2/(time - t0_2)) + nt1_2/(tempVar1_2*(time - t1_2))*exp(tempVar2AMPA_2/(time - t1_2)) + nt2_2/(tempVar1_2*(time - t2_2))*exp(tempVar2AMPA_2/(time - t2_2)) + nt3_2/(tempVar1_2*(time - t3_2))*exp(tempVar2AMPA_2/(time - t3_2)) + nt4_2/(tempVar1_2*(time - t4_2))*exp(tempVar2AMPA_2/(time - t4_2)) + nt5_2/(tempVar1_2*(time - t5_2))*exp(tempVar2AMPA_2/(time - t5_2)) + nt6_2/(tempVar1_2*(time - t6_2))*exp(tempVar2AMPA_2/(time - t6_2)) + nt7_2/(tempVar1_2*(time - t7_2))*exp(tempVar2AMPA_2/(time - t7_2)))/1000;
  tempVar2NMDA_2 := -(distanceNMDA_2*distanceNMDA_2)/(4*NTdiffCoef_2);
  tempVar2mGluR_2 := -(distancemGluR_2*distancemGluR_2)/(4*NTdiffCoef_2);
  NTconcNMDA_2 := k0_2*(nt0_2/(tempVar1_2*(time - t0_2))*exp(tempVar2NMDA_2/(time - t0_2)) + nt1_2/(tempVar1_2*(time - t1_2))*exp(tempVar2NMDA_2/(time - t1_2)) + nt2_2/(tempVar1_2*(time - t2_2))*exp(tempVar2NMDA_2/(time - t2_2)) + nt3_2/(tempVar1_2*(time - t3_2))*exp(tempVar2NMDA_2/(time - t3_2)) + nt4_2/(tempVar1_2*(time - t4_2))*exp(tempVar2NMDA_2/(time - t4_2)) + nt5_2/(tempVar1_2*(time - t5_2))*exp(tempVar2NMDA_2/(time - t5_2)) + nt6_2/(tempVar1_2*(time - t6_2))*exp(tempVar2NMDA_2/(time - t6_2)) + nt7_2/(tempVar1_2*(time - t7_2))*exp(tempVar2NMDA_2/(time - t7_2)))/1000;
  NTconcmGluR_2 := k0_2*(nt0_2/(tempVar1_2*(time - t0_2))*exp(tempVar2mGluR_2/(time - t0_2)) + nt1_2/(tempVar1_2*(time - t1_2))*exp(tempVar2mGluR_2/(time - t1_2)) + nt2_2/(tempVar1_2*(time - t2_2))*exp(tempVar2mGluR_2/(time - t2_2)) + nt3_2/(tempVar1_2*(time - t3_2))*exp(tempVar2mGluR_2/(time - t3_2)) + nt4_2/(tempVar1_2*(time - t4_2))*exp(tempVar2mGluR_2/(time - t4_2)) + nt5_2/(tempVar1_2*(time - t5_2))*exp(tempVar2mGluR_2/(time - t5_2)) + nt6_2/(tempVar1_2*(time - t6_2))*exp(tempVar2mGluR_2/(time - t6_2)) + nt7_2/(tempVar1_2*(time - t7_2))*exp(tempVar2mGluR_2/(time - t7_2)))/1000;
  current_AMPA_3 := (conduc_O2_3*O2_3 + conduc_O3_3*O3_3 + conduc_O4_3*O4_3)*(Vm_3 - Erev_AMPA_3)*0.001*NewNbAMPAR_3;
  sumOpen_3 := O2_3 + O3_3 + O4_3;
  INa_AMPA_3 := PNa_3/100*current_AMPA_3;
  IK_AMPA_3 := PK_3/100*current_AMPA_3;
  ICa_AMPA_3 := PCa_3/100*current_AMPA_3;
  NewNbAMPAR_3 := nbAMPAR_3*LTP_ampaNbModFactor_3;
  kdiss_re16_3 := kdiss_re16_Init_3/Deact_factor_3;
  kass_re11_3 := kass_re11_Init_3/Desens_factor_3;
  kass_re12_3 := kass_re12_Init_3/Desens_factor_3;
  NT_2 := V_of_1;
  Glu_3 := NTconcAMPA_2;

  // Rate rules:
  tmp_fake_2' = 0;

  // Reactions:
  // mass action rate law for second order forward, first order reverse, reversible reactions, two reactants, continuous scheme
  re1_3: R0_3 + $Glu_3 -> R1_3; 4*kass_re1_3*R0_3*Glu_3 - 1*kdiss_re1_3*R1_3;
  // mass action rate law for second order forward, first order reverse, reversible reactions, two reactants, continuous scheme
  re2_3: R1_3 + $Glu_3 -> R2_3; 3*kass_re1_3*R1_3*Glu_3 - 2*kdiss_re1_3*R2_3;
  // mass action rate law for second order forward, first order reverse, reversible reactions, two reactants, continuous scheme
  re3_3: R2_3 + $Glu_3 -> R3_3; 2*kass_re1_3*R2_3*Glu_3 - 3*kdiss_re1_3*R3_3;
  // mass action rate law for second order forward, first order reverse, reversible reactions, two reactants, continuous scheme
  re4_3: R3_3 + $Glu_3 -> R4_3; 1*kass_re1_3*R3_3*Glu_3 - 4*kdiss_re1_3*R4_3;
  // mass action rate law for second order forward, first order reverse, reversible reactions, two reactants, continuous scheme
  re5_3: D0_3 + $Glu_3 -> D1_3; 3*kass_re5_3*D0_3*Glu_3 - kdiss_re5_3*D1_3;
  // mass action rate law for second order forward, first order reverse, reversible reactions, two reactants, continuous scheme
  re6_3: D1_3 + $Glu_3 -> D2_3; 3*kass_re1_3*D1_3*Glu_3 - kdiss_re1_3*D2_3;
  // mass action rate law for second order forward, first order reverse, reversible reactions, two reactants, continuous scheme
  re7_3: D2_3 + $Glu_3 -> D3_3; 2*kass_re1_3*D2_3*Glu_3 - 2*kdiss_re1_3*D3_3;
  // mass action rate law for second order forward, first order reverse, reversible reactions, two reactants, continuous scheme
  re8_3: D3_3 + $Glu_3 -> D4_3; 1*kass_re1_3*D3_3*Glu_3 - 3*kdiss_re1_3*D4_3;
  // mass action rate law for second order forward, first order reverse, reversible reactions, two reactants, continuous scheme
  re9_3: E2_3 + $Glu_3 -> E3_3; 2*kass_re1_3*E2_3*Glu_3 - kdiss_re1_3*E3_3;
  // mass action rate law for second order forward, first order reverse, reversible reactions, two reactants, continuous scheme
  re10_3: E3_3 + $Glu_3 -> E4_3; kass_re1_3*E3_3*Glu_3 - 2*kdiss_re1_3*E4_3;
  // mass action rate law for first order forward, first order reverse, reversible reactions, continuous scheme
  re11_3: R0_3 -> D0_3; 4*kass_re11_3*R0_3 - kdiss_re11_3*D0_3;
  // mass action rate law for first order forward, first order reverse, reversible reactions, continuous scheme
  re12_3: R1_3 -> D1_3; 1*kass_re12_Init_3*R1_3 - kdiss_re12_3*D1_3;
  // mass action rate law for first order forward, first order reverse, reversible reactions, continuous scheme
  re13_3: R2_3 -> D2_3; 2*kass_re12_Init_3*R2_3 - kdiss_re12_3*D2_3;
  // mass action rate law for first order forward, first order reverse, reversible reactions, continuous scheme
  re14_3: R3_3 -> D3_3; 3*kass_re12_Init_3*R3_3 - kdiss_re12_3*D3_3;
  // mass action rate law for first order forward, first order reverse, reversible reactions, continuous scheme
  re15_3: R4_3 -> D4_3; 4*kass_re12_Init_3*R4_3 - kdiss_re12_3*D4_3;
  // mass action rate law for first order forward, first order reverse, reversible reactions, continuous scheme
  re16_3: R2_3 -> O2_3; 2*kass_re16_3*R2_3 - kdiss_re16_3*O2_3;
  // mass action rate law for first order forward, first order reverse, reversible reactions, continuous scheme
  re17_3: R3_3 -> O3_3; 3*kass_re16_3*R3_3 - kdiss_re16_3*O3_3;
  // mass action rate law for first order forward, first order reverse, reversible reactions, continuous scheme
  re18_3: R4_3 -> O4_3; 4*kass_re16_3*R4_3 - kdiss_re16_3*O4_3;
  // mass action rate law for first order forward, first order reverse, reversible reactions, continuous scheme
  re19_3: D2_3 -> E2_3; 1*kass_re19_3*D2_3 - kdiss_re19_3*E2_3;
  // mass action rate law for first order forward, first order reverse, reversible reactions, continuous scheme
  re20_3: D3_3 -> E3_3; 2*kass_re19_3*D3_3 - kdiss_re19_3*E3_3;
  // mass action rate law for first order forward, first order reverse, reversible reactions, continuous scheme
  re21_3: D4_3 -> E4_3; 3*kass_re19_3*D4_3 - kdiss_re19_3*E4_3;

  // Events:
  newPulse_1: at ((time > pulseNb_1*(tup_1 + tdown_1) + Delay_1) && (pulseNb_1 < Npulses_1)): pulseNb_1 = pulseNb_1 + 1, ON_1 = 1, OFF_1 = 0; newPulse_1 is "newPulse of 1";
  newPulseEnd_1: at ((time > (pulseNb_1 - 1)*(tup_1 + tdown_1) + Delay_1 + tup_1) && (pulseNb_1 <= Npulses_1)): ON_1 = 0, OFF_1 = 1; newPulseEnd_1 is "newPulseEnd of 1";
  diffusion_ON_2: at (NT_2 > 0): temp_nt_2 = NT_2, temp_time_2 = time, t0_2 = time - 1e-10, nt0_2 = NT_2, t1_2 = t0_2, t2_2 = t1_2, t3_2 = t2_2, t4_2 = t3_2, t5_2 = t4_2, t6_2 = t5_2, t7_2 = t6_2, nt1_2 = nt0_2, nt2_2 = nt1_2, nt3_2 = nt2_2, nt4_2 = nt3_2, nt5_2 = nt4_2, nt6_2 = nt5_2, nt7_2 = nt6_2; diffusion_ON_2 is "diffusion_ON of 2";
  diffusion_OFF_2: at (NT_2 == 0): temp_nt_2 = 0, temp_time_2 = 0; diffusion_OFF_2 is "diffusion_OFF of 2";

  // Unit definitions:
  unit substance_1 = mole; substance_1 is "substance of 1";
  unit volume_1 = litre; volume_1 is "volume of 1";
  unit area_1 = metre^2; area_1 is "area of 1";
  unit length_1 = metre; length_1 is "length of 1";
  unit time_1 = second; time_1 is "time of 1";
  unit per_mM_per_ms_1 = litre / (1e-3 mole * 1e-3 second); per_mM_per_ms_1 is "per_mM_per_ms of 1";
  unit per_ms_1 = 1 / (1e-3 second); per_ms_1 is "per_ms of 1";
  unit msec_1 = 1e-3 second; msec_1 is "msec of 1";
  unit mVolts_1 = 1e-3 volt; mVolts_1 is "mVolts of 1";
  unit substance_2 = mole; substance_2 is "substance of 2";
  unit volume_2 = litre; volume_2 is "volume of 2";
  unit area_2 = metre^2; area_2 is "area of 2";
  unit length_2 = metre; length_2 is "length of 2";
  unit time_2 = second; time_2 is "time of 2";
  unit mM_2 = 1e-3 mole / litre; mM_2 is "mM of 2";
  unit microm_2 = 1e-6 metre; microm_2 is "microm of 2";
  unit micromsquare_per_ms_2 = (1e-6 metre)^2 / (1e-3 second); micromsquare_per_ms_2 is "micromsquare_per_ms of 2";
  unit ms_2 = 1e-3 second; ms_2 is "ms of 2";
  unit per_mM_per_msec_3 = litre / (1e-3 mole * 1e-3 second); per_mM_per_msec_3 is "per_mM_per_msec of 3";
  unit per_msec_3 = 1 / (1e-3 second); per_msec_3 is "per_msec of 3";
  unit pS_3 = 1e-12 siemens; pS_3 is "pS of 3";
  unit mV_3 = 1e-3 volt; mV_3 is "mV of 3";
  unit pA_3 = 1e-12 ampere; pA_3 is "pA of 3";
  unit substance_3 = mole; substance_3 is "substance of 3";
  unit volume_3 = litre; volume_3 is "volume of 3";
  unit area_3 = metre^2; area_3 is "area of 3";
  unit length_3 = metre; length_3 is "length of 3";
  unit time_3 = second; time_3 is "time of 3";
end
